// COMSOL Multiphysics 6.0.0.405 model "AvecBoucles.mph"
// Outline of the model tree

Parameters
  L_ferrite = 2.5 [cm]
  H_ferrite = 1.6[mm]
  L_interno = 4.1 [cm]
  L_externo = 4.8 [cm]
  H_bobine = 2.5 [mm]
  z_bobine = 0 [mm]
  d_air = 1 [mm]
  S_fil = 0.5 [mm^2]
  mu_r = 2500
  a_litz = 0.2e-6 [m^2]
  H = 13 [mm]
  D_hor = 0[mm]
  L1_boucle = 4 [cm]
  L2_boucle = 0.7 [cm]
  n_boucles = 1
  I = 1.478[A]
  R_air = 0.6 [m]

Geometry
  geom1 "Geometry 1" (3D, length unit m)
    cyl1: Cylinder "base" (disabled) | r = 0.1; h = 0.00001
    blk1: Block "Ferrite 1" | pos = {-L_ferrite, -L_ferrite, 0}; size = {L_ferrite*2, L_ferrite*2, H_ferrite}
    arr1: Array "Ferrites" (disabled)
      input = blk1
      size = {2, 2, 1}
      fullsize = {2, 2, 1}
      displ = {-L_ferrite-0.0002, -L_ferrite-0.0002, 0}
    blk2: Block "Bobine Ext"
      pos = {-L_externo/2, -L_externo/2, H_ferrite+0.0002}
      size = {L_externo, L_externo, H_bobine}
    blk3: Block "Bobine Int"
      pos = {-L_interno/2, -L_interno/2, H_ferrite+0.0002}
      size = {L_interno, L_interno, H_bobine}
    blk4: Block "Cut"
      pos = {-(L_interno/2 +(L_externo-L_interno)/4), 0, H_ferrite+H_bobine*0.5+0.0002}
      base = center
      size = {(L_externo-L_interno)/2, d_air, H_bobine}
    dif1: Difference | input = blk2; input2 = blk3, blk4
    blk5: Block "Air Central"
      pos = {-(L_interno/2 +(L_externo-L_interno)/4), 0, H_ferrite+H_bobine*0.5+0.0002}
      base = center
      size = {(L_externo-L_interno)/2, d_air, H_bobine}
    fil1: Fillet3D "Fillet 1" | edge = dif1(1) edges 1, 14, 17, 26, 29, 32, 33, 36; radius = 4e-3
    mov1: Move | input = blk1, blk5, fil1; displx = 0; disply = 0; displz = -(H_bobine+H_ferrite)
    mir1: Mirror "2nd Coil" | input = mov1; keep = on; pos = {0, 0, H/2+0.0001}
    mov2: Move "Desaxement" (disabled) | input = mir1; displx = D_hor; disply = 0; displz = 0
    blk6: Block "Boucle Dir Ext"
      pos = {-0.5*(L1_boucle+H_bobine), L_externo/2+0.0004, -H_bobine+0.0002}
      size = {L1_boucle+H_bobine, L2_boucle+H_bobine, n_boucles*H_bobine/2}
    blk7: Block "Boucle Dir Int"
      pos = {-0.5*L1_boucle, L_externo/2+0.0004+0.5*H_bobine, -H_bobine+0.0002}
      size = {L1_boucle, L2_boucle, n_boucles*H_bobine/2}
    blk8: Block "Cut Droit"
      pos = {-L1_boucle*0.5-H_bobine*0.5, 0.5*(L_externo+L2_boucle+H_bobine-d_air)+0.0004, -H_bobine+0.0002}
      size = {H_bobine/2, d_air, n_boucles*H_bobine/2}
    dif2: Difference | input = blk6; input2 = blk7, blk8
    blk9: Block "Air Droit"
      pos = {-L1_boucle*0.5-H_bobine*0.5, 0.5*(L_externo+L2_boucle+H_bobine-d_air)+0.0004, -H_bobine+0.0002}
      size = {H_bobine/2, d_air, n_boucles*H_bobine/2}
    fil2: Fillet3D "Fillet 2" | edge = dif2(1) edges 1, 14, 17, 26, 29, 32, 33, 36; radius = 1e-3
    mir2: Mirror "Esquerda" | input = blk9, fil2; keep = on; axis = {0, 1, 0}
    mov3: Move "Déplacer 3" | input = blk9, fil2, mir1, mir2, mov1; displx = 0; disply = 0; displz = -0.0002
    sph1: Sphere | pos = {0, 0, H/2}; r = 0.5
    fin: Finalize "Form Union"

Materials
  mat1: Common "Soft Iron (Without Losses)" on domains 2, 3
    def "Basic"
      electricconductivity = 0[S/m]
      relpermittivity = 1
      relpermeability = mu_r
    BHCurve
      normB = BH(normHin)
      normH = BH_inv(normBin)
      Wpm = BH_prim(normHin)
      normHin = sqrt(H1^2+H2^2+H3^2+eps)
      DESCR_PREFIX:normHin = Magnetic field norm
      normBin = sqrt(B1^2+B2^2+B3^2+eps)
      DESCR_PREFIX:normBin = Magnetic flux density norm
      BH: Interpolation
        table = 
          {0, 0}
          {663.146, 1}
          {1067.5, 1.1}
          {1705.23, 1.2}
          {2463.11, 1.3}
          {3841.67, 1.4}
          {5425.74, 1.5}
          {7957.75, 1.6}
          {12298.3, 1.7}
          {20462.8, 1.8}
          {32169.6, 1.9}
          {61213.4, 2}
          {111408, 2.1}
          {188487.757, 2.2}
          {267930.364, 2.3}
          {347507.836, 2.4}
        extrap = linear
        fununit = T
        argunit = A/m
        defineinv = on
        defineprimfun = on
    EffectiveBHCurve
      normBeff = BHeff(normHeffin)
      normHeff = BHeff_inv(normBeffin)
      normHeffin = sqrt(realdot(H1,H1)+realdot(H2,H2)+realdot(H3,H3)+eps)
      DESCR_PREFIX:normHeffin = Effective magnetic field norm
      normBeffin = sqrt(realdot(B1,B1)+realdot(B2,B2)+realdot(B3,B3)+eps)
      DESCR_PREFIX:normBeffin = Effective magnetic flux density norm
      BHeff: Interpolation
        table = 
          {0, 0}
          {663.146, 1.00000005169}
          {1067.5, 1.49364951241}
          {1705.23, 1.94153284613}
          {2463.11, 2.25776566937}
          {3841.67, 2.60998064243}
          {5425.74, 2.86644520908}
          {7957.75, 3.14414380972}
          {12298.3, 3.44853805165}
          {20462.8, 3.78167119737}
          {32169.6, 4.05834559011}
          {61213.4, 4.42064655295}
          {111408, 4.72127408955}
          {188487.757, 4.97214814072}
          {267930.364, 5.14551086086}
          {347507.836, 5.24551086143}
        extrap = linear
        fununit = T
        argunit = A/m
        defineinv = on
  mat2: Common "Copper" on domains 4, 5, 8, 10
    def "Basic"
      relpermeability = 1
      electricconductivity = 5.998e7[S/m]
      heatcapacity = 385[J/(kg*K)]
      relpermittivity = 1
      emissivity = 0.5
      density = 8940[kg/m^3]
      thermalconductivity = 400[W/(m*K)]
    Enu "Young's modulus and Poisson's ratio"
      E = 126e9[Pa]
      nu = 0.34
    linzRes "Linearized resistivity"
      rho0 = 1.667e-8[ohm*m]
      alpha = 3.862e-3[1/K]
      Tref = 293.15[K]
  mat3: Common "Air" on domains 1, 6, 7, 9, 11
    def "Basic"
      thermalexpansioncoefficient = alpha_p(pA,T)
      molarmass = 0.02897[kg/mol]
      bulkviscosity = muB(T)
      relpermeability = 1
      relpermittivity = 1
      dynamicviscosity = eta(T)
      ratioofspecificheat = 1.4
      electricconductivity = 0[S/m]
      heatcapacity = Cp(T)
      density = rho(pA,T)
      thermalconductivity = k(T)
      soundspeed = cs(T)
      eta: Piecewise | arg = T; pieces = {200.0, 1600.0, -8.38278E-7+8.35717342E-8*T^1-7.69429583E-11*T^2+4.6437266E-14*T^3-1.06585607E-17*T^4}; argunit = K; fununit = Pa*s
      Cp: Piecewise | arg = T; pieces = {200.0, 1600.0, 1047.63657-0.372589265*T^1+9.45304214E-4*T^2-6.02409443E-7*T^3+1.2858961E-10*T^4}; argunit = K; fununit = J/(kg*K)
      rho: Analytic | expr = pA*0.02897/R_const[K*mol/J]/T; args = {pA, T}; fununit = kg/m^3; argunit = {Pa, K}
      k: Piecewise | arg = T; pieces = {200.0, 1600.0, -0.00227583562+1.15480022E-4*T^1-7.90252856E-8*T^2+4.11702505E-11*T^3-7.43864331E-15*T^4}; argunit = K; fununit = W/(m*K)
      cs: Analytic | expr = sqrt(1.4*R_const[K*mol/J]/0.02897*T); args = T; fununit = m/s; argunit = K
      an1: Analytic | funcname = alpha_p; expr = -1/rho(pA,T)*d(rho(pA,T),T); args = {pA, T}; fununit = 1/K; argunit = {Pa, K}
      an2: Analytic "Analytic 2a" | funcname = muB; expr = 0.6*eta(T); args = T; fununit = Pa*s; argunit = K
    RefractiveIndex
      n = 1
      ki = 0
    NonlinearModel
      BA = (def.gamma+1)/2
    idealGas
      Rs = R_const/Mn
      heatcapacity = Cp(T)
      ratioofspecificheat = 1.4
      molarmass = 0.02897
      Cp: Piecewise | arg = T; pieces = {200.0, 1600.0, 1047.63657-0.372589265*T^1+9.45304214E-4*T^2-6.02409443E-7*T^3+1.2858961E-10*T^4}; argunit = K; fununit = J/(kg*K)

Physics
  mf: InductionCurrents "Magnetic Fields" on domains 1-5, 8, 10
    dependent variable A = {Ax, Ay, Az}
    al1: AmperesLaw "Ampère's Law 1" (default)
    mi1: MagneticInsulation (default)
    init1: init "Initial Values 1" (default)
    coil1: Coil "Coil Central" on domains 4
      ConductorModel = Multi
      CoilType = Numeric
      ICoil = I
      N = 6
      coilWindArea = a_litz
      ccc1: CoilCurrentCalculation "Geometry Analysis 1" (default)
        ct1: CoilTerminal "Input 1" on boundaries 24
        cg1: CoilGround "Output 1" on boundaries 32
    coil2: Coil "Coil Droit" on domains 8
      ConductorModel = Multi
      CoilType = Numeric
      ICoil = I
      N = 1
      coilWindArea = a_litz
      ccc1: CoilCurrentCalculation "Geometry Analysis 1" (default)
        ct1: CoilTerminal "Input 1" on boundaries 46
        cg1: CoilGround "Output 1" on boundaries 42
    coil3: Coil "Coil Gauche" on domains 10
      ConductorModel = Multi
      CoilType = Numeric
      ICoil = I
      N = 1
      coilWindArea = a_litz
      ccc1: CoilCurrentCalculation "Geometry Analysis 1" (default)
        ct1: CoilTerminal "Input 1" on boundaries 57
        cg1: CoilGround "Output 1" on boundaries 53
    coil4: Coil "Coil Receptrice" on domains 5
      ConductorModel = Multi
      CoilType = Numeric
      ICoil = 0[A]
      N = 6
      coilWindArea = a_litz
      ccc1: CoilCurrentCalculation "Geometry Analysis 1" (default)
        ct1: CoilTerminal "Input 1" on boundaries 34
        cg1: CoilGround "Output 1" on boundaries 28

Mesh
  mesh1 "Mesh 1" (physics-controlled)
    size: MeshSizeDefault | hauto = 2

Studies
  std1 "Study 1"
    ccc: CoilCurrentCalculation "Coil Geometry Analysis"
    freq: Frequency "Frequency Domain" | plist = 100e3

Tables
  tbl1: Table
    // Global Evaluation 1
    freq (Hz) | mf.PhiCoil_4 (Wb)
    100000 | -2.06643e-06+1.64847e-12i
  tbl2: Table
    // Global Evaluation 1
    H (mm) | Mutuelle (H) | Coil inductance (H) | Mutuelle (H) | mf.LCoil_1+mf.LCoil_2+mf.LCoil_3 (H)
    5 | 3.42612e-06-2.93437e-12i | 6.32778e-06 | 3.42612e-06-2.93437e-12i | 6.67798e-06
    10 | 2.06643e-06-1.64847e-12i | 5.85731e-06 | 2.06643e-06-1.64847e-12i | 6.19052e-06
    15 | 1.37423e-06-1.06994e-12i | 5.69128e-06 | 1.37423e-06-1.06994e-12i | 6.01946e-06
    20 | 9.61064e-07-7.41794e-13i | 5.62117e-06 | 9.61064e-07-7.41794e-13i | 5.94749e-06
    25 | 6.93928e-07-5.34297e-13i | 5.58964e-06 | 6.93928e-07-5.34297e-13i | 5.91542e-06
    30 | 5.13087e-07-3.95173e-13i | 5.57575e-06 | 5.13087e-07-3.95173e-13i | 5.90129e-06
  tbl3: Table
    // Global Evaluation 1
    H (mm) | Inductance Propre (H) | Resistance (Ω) | Mutuelle (H)
    5 | 6.63595e-06 | 0.101733 | 3.42248e-06-2.78533e-12i
    10 | 6.15274e-06 | 0.101733 | 2.06496e-06-1.55658e-12i
    15 | 5.98081e-06 | 0.101733 | 1.37333e-06-1.00609e-12i
    20 | 5.90966e-06 | 0.101733 | 9.60659e-07-6.95722e-13i
    25 | 5.87669e-06 | 0.101732 | 6.93674e-07-4.99714e-13i
    30 | 5.86118e-06 | 0.101732 | 5.12902e-07-3.6865e-13i
  tbl4: Table
    // Global Evaluation 1
    H (mm) | Inductance Propre (H) | Resistance (Ω) | Mutuelle (H)
    5 | 6.58752e-06 | 0.100779 | 3.4111e-06-2.77905e-12i
    10 | 6.10441e-06 | 0.100779 | 2.05885e-06-1.55129e-12i
    15 | 5.93443e-06 | 0.100778 | 1.36982e-06-1.00327e-12i
    20 | 5.86266e-06 | 0.100778 | 9.58068e-07-6.92898e-13i
    25 | 5.83333e-06 | 0.100778 | 6.92078e-07-4.97972e-13i
    30 | 5.81458e-06 | 0.100778 | 5.11853e-07-3.67097e-13i
  tbl5: Table
    cln1x | Height
    0 | 0.000302222
    0.000373532 | 0.000302234
    0.000422832 | 0.000302236
    0.00251367 | 0.000302327
    0.00252844 | 0.000301629
    0.00255458 | 0.000302007
    0.00267624 | 0.000302362
    0.00295207 | 0.000302552
    0.00440111 | 0.000302318
    0.00548424 | 0.000302173
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  tbl8: Table
    // Global Evaluation 1
    Mutuelle (H) | Inductance Propre (H)
    1.93983e-06-1.75983e-12i | 6.3462e-06
  tbl9: Table
    // Evaluation globale 1
    H (mm) | freq (Hz) | Mutuelle (H) | Inductance propre (H) | Inductance Receptrice (H)
    5 | 100000 | 3.11192e-06-2.92158e-12i | 6.05629e-06 | 5.77521e-06
    10 | 100000 | 1.921e-06-1.68645e-12i | 5.66979e-06 | 5.40036e-06
    15 | 100000 | 1.29108e-06-1.10404e-12i | 5.52596e-06 | 5.2601e-06
  tbl10: Table
    cln1x | Height
    0 | 6.88956e-06
    0.000347517 | 6.89401e-06
    0.000998843 | 6.90237e-06
    0.0012415 | 6.90548e-06
    0.0012547 | 6.93657e-06
    0.001268 | 6.9366e-06
    0.00140259 | 6.93686e-06
    0.0020876 | 6.93822e-06
    0.00235764 | 6.78876e-06
    0.00349555 | 6.76616e-06
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  tbl11: Table
    cln1x | Height
    0 | 7.46193e-06
    0.000170366 | 7.46084e-06
    0.000934072 | 7.45612e-06
    0.00135216 | 7.45367e-06
    0.00212197 | 7.42514e-06
    0.00387756 | 7.39257e-06
    0.00400016 | 7.39036e-06
    0.00418186 | 7.3871e-06
    0.00451285 | 7.59473e-06
    0.00451921 | 7.59445e-06
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  tbl12: Table
    // Global Evaluation 1
    freq (Hz) | mf.LCoil_1+mf.LCoil_2+mf.LCoil_3 (H)
    100000 | 5.47646e-06
  tbl13: Table
    // Global Evaluation 1
    freq (Hz) | Mutuelle (uH) | Coefficient de Couplage (%)
    100000 | 1.46742 | 27.4525
  tbl14: Table
    // Point Evaluation 1
    freq (Hz) | Magnetic flux density norm (uT), Point: (0, 0, 0.0065)
    100000 | 373.806