// COMSOL Multiphysics 6.0.0.405 model "Otimização.mph"
// Outline of the model tree

Parameters
  L_ferrite = 2.5 [cm]
  H_ferrite = 1.6[mm]
  L_interno = 4.1 [cm]
  L_externo = 4.8 [cm]
  H_bobine = 2.5 [mm]
  z_bobine = 0 [mm]
  d_air = 1 [mm]
  S_fil = 0.5 [mm^2]
  mu_r = 2500
  a_litz = 0.2e-6 [m^2]
  H = 13 [mm]
  D_hor = 0[mm]
  L1_boucle = 4.3 [cm]
  L2_boucle = 1.7 [cm]
  n_boucles = 1
  I = 1.478[A]
  R_air = 0.6 [m]
  B0 = 6.865e-6
  R0 = 0.086393
  K0 = 27.743 [%]

Probes
  var1: GlobalVariable "Sonde de variable globale 1"
    probename = K
    expr = abs(mf.PhiCoil_4/sqrt((mf.PhiCoil_1 + mf.PhiCoil_2 + mf.PhiCoil_3)*mf.PhiCoil_1))
    unit = 1
    descr = Coefficient de Couplage
    table = tbl1
  var2: GlobalVariable "Sonde de variable globale 2"
    probename = R
    expr = mf.RCoil_1+mf.RCoil_2+mf.RCoil_3
    unit = Ω
    table = tbl3
  bnd1: Boundary "Sonde sur frontière 1" on selection geom1_wp1_bnd
    probename = B_mean
    expr = mf.normB
    unit = T
    descr = Norme de la densité de flux magnétique
    frame = spatial
    table = tbl1

Geometry
  geom1 "Geometry 1" (3D, length unit m)
    cyl1: Cylinder "base" (disabled) | r = 0.1; h = 0.00001
    blk1: Block "Ferrite 1" | pos = {-L_ferrite, -L_ferrite, 0}; size = {L_ferrite*2, L_ferrite*2, H_ferrite}
    arr1: Array "Ferrites" (disabled)
      input = blk1
      size = {2, 2, 1}
      fullsize = {2, 2, 1}
      displ = {-L_ferrite-0.0002, -L_ferrite-0.0002, 0}
    blk2: Block "Bobine Ext" | pos = {-L_externo/2, -L_externo/2, H_ferrite}; size = {L_externo, L_externo, H_bobine}
    blk3: Block "Bobine Int" | pos = {-L_interno/2, -L_interno/2, H_ferrite}; size = {L_interno, L_interno, H_bobine}
    blk4: Block "Cut"
      pos = {-(L_interno/2 +(L_externo-L_interno)/4), 0, H_ferrite+H_bobine*0.5}
      base = center
      size = {(L_externo-L_interno)/2, d_air, H_bobine}
    dif1: Difference | input = blk2; input2 = blk3, blk4
    blk5: Block "Air Central"
      pos = {-(L_interno/2 +(L_externo-L_interno)/4), 0, H_ferrite+H_bobine*0.5}
      base = center
      size = {(L_externo-L_interno)/2, d_air, H_bobine}
    fil1: Fillet3D "Fillet 1" | edge = dif1(1) edges 1, 14, 17, 26, 29, 32, 33, 36; radius = 2e-3
    mov1: Move | input = blk1, blk5, fil1; displx = 0; disply = 0; displz = -(H_bobine+H_ferrite)
    mov3: Move "Déplacer 3" | input = mov1(1); displx = 0; disply = 0; displz = -0.00035
    mir1: Mirror "2nd Coil" | input = mov3(1), mov1(2), mov1(3); keep = on; pos = {0, 0, H/2+0.0001}
    mov2: Move "Desaxement" (disabled) | input = mir1; displx = D_hor; disply = 0; displz = 0
    blk6: Block "Boucle Dir Ext"
      pos = {-0.5*(L1_boucle+H_bobine), L_externo/2+0.0005, -H_bobine}
      size = {L1_boucle+H_bobine, L2_boucle+H_bobine, n_boucles*H_bobine/2}
    blk7: Block "Boucle Dir Int"
      pos = {-0.5*L1_boucle, L_externo/2+0.0005+0.5*H_bobine, -H_bobine}
      size = {L1_boucle, L2_boucle, n_boucles*H_bobine/2}
    blk8: Block "Cut Droit"
      pos = {-L1_boucle*0.5-H_bobine*0.5, 0.5*(L_externo+L2_boucle+H_bobine-d_air)+0.0005, -H_bobine}
      size = {H_bobine/2, d_air, n_boucles*H_bobine/2}
    dif2: Difference | input = blk6; input2 = blk7, blk8
    blk9: Block "Air Droit"
      pos = {-L1_boucle*0.5-H_bobine*0.5, 0.5*(L_externo+L2_boucle+H_bobine-d_air)+0.0005, -H_bobine}
      size = {H_bobine/2, d_air, n_boucles*H_bobine/2}
    fil2: Fillet3D "Fillet 2" | edge = dif2(1) edges 1, 14, 17, 26, 29, 32, 33, 36; radius = 10e-4
    mir2: Mirror "Esquerda" | input = blk9, fil2; keep = on; axis = {0, 1, 0}
    wp1: WorkPlane "Plan de travail 1" | quickplane = xz; quicky = 6.5e-2; unite = on
      r1: Rectangle | pos = {0, H/2}; base = center; size = {0.08, 0.07}
    sph1: Sphere | pos = {0, 0, H/2}; r = 0.3
    fin: Finalize "Form Union"

Materials
  mat1: Common "Soft Iron (Without Losses)" on domains 2, 3
    def "Basic"
      electricconductivity = 0[S/m]
      relpermittivity = 1
      relpermeability = mu_r
    BHCurve
      normB = BH(normHin)
      normH = BH_inv(normBin)
      Wpm = BH_prim(normHin)
      normHin = sqrt(H1^2+H2^2+H3^2+eps)
      DESCR_PREFIX:normHin = Magnetic field norm
      normBin = sqrt(B1^2+B2^2+B3^2+eps)
      DESCR_PREFIX:normBin = Magnetic flux density norm
      BH: Interpolation
        table = 
          {0, 0}
          {663.146, 1}
          {1067.5, 1.1}
          {1705.23, 1.2}
          {2463.11, 1.3}
          {3841.67, 1.4}
          {5425.74, 1.5}
          {7957.75, 1.6}
          {12298.3, 1.7}
          {20462.8, 1.8}
          {32169.6, 1.9}
          {61213.4, 2}
          {111408, 2.1}
          {188487.757, 2.2}
          {267930.364, 2.3}
          {347507.836, 2.4}
        extrap = linear
        fununit = T
        argunit = A/m
        defineinv = on
        defineprimfun = on
    EffectiveBHCurve
      normBeff = BHeff(normHeffin)
      normHeff = BHeff_inv(normBeffin)
      normHeffin = sqrt(realdot(H1,H1)+realdot(H2,H2)+realdot(H3,H3)+eps)
      DESCR_PREFIX:normHeffin = Effective magnetic field norm
      normBeffin = sqrt(realdot(B1,B1)+realdot(B2,B2)+realdot(B3,B3)+eps)
      DESCR_PREFIX:normBeffin = Effective magnetic flux density norm
      BHeff: Interpolation
        table = 
          {0, 0}
          {663.146, 1.00000005169}
          {1067.5, 1.49364951241}
          {1705.23, 1.94153284613}
          {2463.11, 2.25776566937}
          {3841.67, 2.60998064243}
          {5425.74, 2.86644520908}
          {7957.75, 3.14414380972}
          {12298.3, 3.44853805165}
          {20462.8, 3.78167119737}
          {32169.6, 4.05834559011}
          {61213.4, 4.42064655295}
          {111408, 4.72127408955}
          {188487.757, 4.97214814072}
          {267930.364, 5.14551086086}
          {347507.836, 5.24551086143}
        extrap = linear
        fununit = T
        argunit = A/m
        defineinv = on
  mat2: Common "Copper" on domains 4, 5, 8, 10
    def "Basic"
      relpermeability = 1
      electricconductivity = 5.998e7[S/m]
      heatcapacity = 385[J/(kg*K)]
      relpermittivity = 1
      emissivity = 0.5
      density = 8940[kg/m^3]
      thermalconductivity = 400[W/(m*K)]
    Enu "Young's modulus and Poisson's ratio"
      E = 126e9[Pa]
      nu = 0.34
    linzRes "Linearized resistivity"
      rho0 = 1.667e-8[ohm*m]
      alpha = 3.862e-3[1/K]
      Tref = 293.15[K]
  mat3: Common "Air" on domains 1, 6, 7, 9, 11
    def "Basic"
      thermalexpansioncoefficient = alpha_p(pA,T)
      molarmass = 0.02897[kg/mol]
      bulkviscosity = muB(T)
      relpermeability = 1
      relpermittivity = 1
      dynamicviscosity = eta(T)
      ratioofspecificheat = 1.4
      electricconductivity = 0[S/m]
      heatcapacity = Cp(T)
      density = rho(pA,T)
      thermalconductivity = k(T)
      soundspeed = cs(T)
      eta: Piecewise | arg = T; pieces = {200.0, 1600.0, -8.38278E-7+8.35717342E-8*T^1-7.69429583E-11*T^2+4.6437266E-14*T^3-1.06585607E-17*T^4}; argunit = K; fununit = Pa*s
      Cp: Piecewise | arg = T; pieces = {200.0, 1600.0, 1047.63657-0.372589265*T^1+9.45304214E-4*T^2-6.02409443E-7*T^3+1.2858961E-10*T^4}; argunit = K; fununit = J/(kg*K)
      rho: Analytic | expr = pA*0.02897/R_const[K*mol/J]/T; args = {pA, T}; fununit = kg/m^3; argunit = {Pa, K}
      k: Piecewise | arg = T; pieces = {200.0, 1600.0, -0.00227583562+1.15480022E-4*T^1-7.90252856E-8*T^2+4.11702505E-11*T^3-7.43864331E-15*T^4}; argunit = K; fununit = W/(m*K)
      cs: Analytic | expr = sqrt(1.4*R_const[K*mol/J]/0.02897*T); args = T; fununit = m/s; argunit = K
      an1: Analytic | funcname = alpha_p; expr = -1/rho(pA,T)*d(rho(pA,T),T); args = {pA, T}; fununit = 1/K; argunit = {Pa, K}
      an2: Analytic "Analytic 2a" | funcname = muB; expr = 0.6*eta(T); args = T; fununit = Pa*s; argunit = K
    RefractiveIndex
      n = 1
      ki = 0
    NonlinearModel
      BA = (def.gamma+1)/2
    idealGas
      Rs = R_const/Mn
      heatcapacity = Cp(T)
      ratioofspecificheat = 1.4
      molarmass = 0.02897
      Cp: Piecewise | arg = T; pieces = {200.0, 1600.0, 1047.63657-0.372589265*T^1+9.45304214E-4*T^2-6.02409443E-7*T^3+1.2858961E-10*T^4}; argunit = K; fununit = J/(kg*K)

Physics
  mf: InductionCurrents "Magnetic Fields" on domains 1-5, 8, 10
    dependent variable A = {Ax, Ay, Az}
    al1: AmperesLaw "Ampère's Law 1" (default)
    mi1: MagneticInsulation (default)
    init1: init "Initial Values 1" (default)
    coil1: Coil "Coil Central" on domains 4
      ConductorModel = Multi
      CoilType = Numeric
      ICoil = I
      N = 6
      coilWindArea = a_litz
      ccc1: CoilCurrentCalculation "Geometry Analysis 1" (default)
        ct1: CoilTerminal "Input 1" on boundaries 25
        cg1: CoilGround "Output 1" on boundaries 33
    coil2: Coil "Coil Droit" on domains 8
      ConductorModel = Multi
      CoilType = Numeric
      ICoil = I
      N = n_boucles
      coilWindArea = a_litz
      ccc1: CoilCurrentCalculation "Geometry Analysis 1" (default)
        ct1: CoilTerminal "Input 1" on boundaries 47
        cg1: CoilGround "Output 1" on boundaries 43
    coil3: Coil "Coil Gauche" on domains 10
      ConductorModel = Multi
      CoilType = Numeric
      ICoil = I
      N = n_boucles
      coilWindArea = a_litz
      ccc1: CoilCurrentCalculation "Geometry Analysis 1" (default)
        ct1: CoilTerminal "Input 1" on boundaries 58
        cg1: CoilGround "Output 1" on boundaries 54
    coil4: Coil "Coil Receptrice" on domains 5
      ConductorModel = Multi
      CoilType = Numeric
      ICoil = 0[A]
      N = 6
      coilWindArea = a_litz
      ccc1: CoilCurrentCalculation "Geometry Analysis 1" (default)
        ct1: CoilTerminal "Input 1" on boundaries 35
        cg1: CoilGround "Output 1" on boundaries 29

Mesh
  mesh1 "Mesh 1" (physics-controlled)
    size: MeshSizeDefault | hauto = 3

Studies
  std1 "Study 1"
    opt: Optimization "Optimisation"
      opttol = 0.001
      gradientStep = freq
      nsolvemax = 500
      optobj = ((comp1.K^3)/(comp1.R*comp1.B_mean^2)) * (R0*B0^2)/(K0^3)
      descr = K^3/R*B^2 * Valeurs initiales
      optobjEvaluateFor = freq
      objectivetype = maximization
      objectivescaling = init
      initval = {2 [cm], 0.5 [cm]}
      scale = {1, 1}
      lbound = {0.7 [cm], 0.3 [cm]}
      ubound = {4.5 [cm], }
      pname = {L1_boucle, L2_boucle}
    ccc: CoilCurrentCalculation "Coil Geometry Analysis"
    freq: Frequency "Frequency Domain" | plist = 100e3

Tables
  tbl1: Table
    freq (Hz) | Coefficient de Couplage (1) | Magnetic flux density norm (T), Sonde sur frontière 1
    100000 | 0.261819 | 4.1279e-06
  tbl2: Table "Objectif Table associée à la sonde 2"
    L1_boucle (m) | L2_boucle (m) | Objective
    0.02 | 0.005 | 0.892654
    0.045 | 0.005 | 0.832597
    0.02 | 0.305 | 0.0624675
    0.02625 | 0.155 | 0.0696266
    0.029375 | 0.08 | 0.0794839
    0.0309375 | 0.0425 | 0.096323
    0.0317188 | 0.02375 | 1.5098
    0.007 | 0.0236122 | 1.0196
    0.0187188 | 0.0423622 | 0.165244
    0.0196797 | 0.0143406 | 0.995347
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  tbl3: Table "Table associée à la sonde 3"
    freq (Hz) | mf.RCoil_1+mf.RCoil_2+mf.RCoil_3 (Ω)
    100000 | 0.10968
  tbl4: Table
    // Evaluation globale 6
    freq (Hz) | Résistance de bobine (AC) (Ω)
    100000 | 0.086376
  tbl5: Table
    // Evaluation Coef Couplage
    freq (Hz) | Coefficient de Couplage (%) | Coefficient de Couplage (%)
    100000 | 26.0984 | 26.099
  tbl6: Table
    // Sonde sur frontière 1
    freq (Hz) | Norme de la densité de flux magnétique (T), Sonde sur frontière 1
    100000 | 5.60815e-06
  tbl7: Table
    // Sonde sur frontière 1
    freq (Hz) | Sonde sur frontière 1 (T), Sonde sur frontière 1
    100000 | 5.44488e-06
  tbl8: Table
    // Sonde de variable globale 2
    freq (Hz) | mf.RCoil_1+mf.RCoil_2+mf.RCoil_3 (Ω)
    100000 | 0.106752
  tbl9: Table
    // Sonde de variable globale 1
    freq (Hz) | Coefficient de Couplage (1)
    100000 | 0.260652
  tbl10: Table
    // Sonde de variable globale 2
    freq (Hz) | mf.RCoil_1+mf.RCoil_2+mf.RCoil_3 (Ω)
    100000 | 0.10743
  tbl11: Table
    // Sonde sur frontière 1
    freq (Hz) | Norme de la densité de flux magnétique (T), Sonde sur frontière 1
    100000 | 5.0504e-06
  tbl12: Table
    // Sonde sur frontière 1
    freq (Hz) | Magnetic flux density norm (T), Sonde sur frontière 1 | Coefficient de Couplage (%), Sonde sur frontière 1 | Resist (Ω), Sonde sur frontière 1
    100000 | 4.1279e-06 | 26.1819 | 0.10968
  tbl13: Table
    // Sonde de variable globale 1
    freq (Hz) | Coefficient de Couplage (1)
    100000 | 0.261819
  tbl14: Table
    // Sonde de variable globale 2
    freq (Hz) | mf.RCoil_1+mf.RCoil_2+mf.RCoil_3 (Ω)
    100000 | 0.10968

Plots
  pg2: PlotGroup1D "Groupe de graphiques sur sonde 2"
    tblp1: Table "Graphique basé sur la table de sonde 1" | table = tbl1
    tblp2: Table "Graphique basé sur la table de sonde 2" | table = tbl3