// COMSOL Multiphysics 6.0.0.405 model "BobinaCirc.mph"
// Outline of the model tree

Parameters
  e_ferrite = 1.25 [mm]
  r_ferrite = 2.5 [cm]
  h_bobine = 2.4 [mm]
  r_ext = 2.165 [cm]
  r_int = 1.05 [cm]
  sep = 0.5 [mm]
  H = 2[cm]
  mu_r = 2500
  d = 1 [mm]
  N = 20
  I = 1 [A]
  a_litz = 0.35e-6[m^2]

Geometry
  geom1 "Geometry 1" (3D, length unit m)
    cyl1: Cylinder (disabled) | r = 0.1; h = 0.000001
    cyl2: Cylinder "Ferrite" | pos = {0, 0, -e_ferrite - h_bobine - sep}; r = r_ferrite; h = e_ferrite
    cyl3: Cylinder "Bobine1" | pos = {0, 0, -h_bobine}; r = r_ext; h = h_bobine
    cyl4: Cylinder "Bobine2" | pos = {0, 0, -h_bobine}; r = r_int; h = h_bobine
    blk1: Block "Air gap" | pos = {r_int*0.95, -d/2, -h_bobine}; size = {(r_ext - r_int) * 1.05, d, h_bobine}
    dif1: Difference | input = cyl3; input2 = blk1, cyl4
    blk2: Block "Air gap 1" | pos = {r_int, -d/2, -h_bobine}; size = {(r_ext - r_int), d, h_bobine}
    sph1: Sphere | axistype = x; r = 0.5
    mir1: Mirror | input = blk2, cyl2, dif1; keep = on; pos = {0, 0, H/2}
    fin: Finalize "Form Union"
    rmd1: RemoveDetails | infotype = result; removeddetails = {Collapsed_faces, 8}
      aclf1: CollapseFaces | input = fin(1) boundaries 41-44, 55-58; collvtxtol = manual; maxfaceperimeter = 0.0002

Materials
  mat1: Common "Air" on domains 1, 6, 7
    def "Basic"
      thermalexpansioncoefficient = alpha_p(pA,T)
      molarmass = 0.02897[kg/mol]
      bulkviscosity = muB(T)
      relpermeability = 1
      relpermittivity = 1
      dynamicviscosity = eta(T)
      ratioofspecificheat = 1.4
      electricconductivity = 0[S/m]
      heatcapacity = Cp(T)
      density = rho(pA,T)
      thermalconductivity = k(T)
      soundspeed = cs(T)
      eta: Piecewise | arg = T; pieces = {200.0, 1600.0, -8.38278E-7+8.35717342E-8*T^1-7.69429583E-11*T^2+4.6437266E-14*T^3-1.06585607E-17*T^4}; argunit = K; fununit = Pa*s
      Cp: Piecewise | arg = T; pieces = {200.0, 1600.0, 1047.63657-0.372589265*T^1+9.45304214E-4*T^2-6.02409443E-7*T^3+1.2858961E-10*T^4}; argunit = K; fununit = J/(kg*K)
      rho: Analytic | expr = pA*0.02897/R_const[K*mol/J]/T; args = {pA, T}; fununit = kg/m^3; argunit = {Pa, K}
      k: Piecewise | arg = T; pieces = {200.0, 1600.0, -0.00227583562+1.15480022E-4*T^1-7.90252856E-8*T^2+4.11702505E-11*T^3-7.43864331E-15*T^4}; argunit = K; fununit = W/(m*K)
      cs: Analytic | expr = sqrt(1.4*R_const[K*mol/J]/0.02897*T); args = T; fununit = m/s; argunit = K
      an1: Analytic | funcname = alpha_p; expr = -1/rho(pA,T)*d(rho(pA,T),T); args = {pA, T}; fununit = 1/K; argunit = {Pa, K}
      an2: Analytic "Analytic 2a" | funcname = muB; expr = 0.6*eta(T); args = T; fununit = Pa*s; argunit = K
    RefractiveIndex
      n = 1
      ki = 0
    NonlinearModel
      BA = (def.gamma+1)/2
    idealGas
      Rs = R_const/Mn
      heatcapacity = Cp(T)
      ratioofspecificheat = 1.4
      molarmass = 0.02897
      Cp: Piecewise | arg = T; pieces = {200.0, 1600.0, 1047.63657-0.372589265*T^1+9.45304214E-4*T^2-6.02409443E-7*T^3+1.2858961E-10*T^4}; argunit = K; fununit = J/(kg*K)
  mat2: Common "Copper" on domains 4, 5
    def "Basic"
      relpermeability = 1
      electricconductivity = 5.998e7[S/m]
      heatcapacity = 385[J/(kg*K)]
      relpermittivity = 1
      emissivity = 0.5
      density = 8940[kg/m^3]
      thermalconductivity = 400[W/(m*K)]
    Enu "Young's modulus and Poisson's ratio"
      E = 126e9[Pa]
      nu = 0.34
    linzRes "Linearized resistivity"
      rho0 = 1.667e-8[ohm*m]
      alpha = 3.862e-3[1/K]
      Tref = 293.15[K]
  mat3: Common "Soft Iron (Without Losses)" on domains 2, 3
    def "Basic"
      electricconductivity = 0[S/m]
      relpermittivity = 1
      relpermeability = mu_r
    BHCurve
      normB = BH(normHin)
      normH = BH_inv(normBin)
      Wpm = BH_prim(normHin)
      normHin = sqrt(H1^2+H2^2+H3^2+eps)
      DESCR_PREFIX:normHin = Magnetic field norm
      normBin = sqrt(B1^2+B2^2+B3^2+eps)
      DESCR_PREFIX:normBin = Magnetic flux density norm
      BH: Interpolation
        table = 
          {0, 0}
          {663.146, 1}
          {1067.5, 1.1}
          {1705.23, 1.2}
          {2463.11, 1.3}
          {3841.67, 1.4}
          {5425.74, 1.5}
          {7957.75, 1.6}
          {12298.3, 1.7}
          {20462.8, 1.8}
          {32169.6, 1.9}
          {61213.4, 2}
          {111408, 2.1}
          {188487.757, 2.2}
          {267930.364, 2.3}
          {347507.836, 2.4}
        extrap = linear
        fununit = T
        argunit = A/m
        defineinv = on
        defineprimfun = on
    EffectiveBHCurve
      normBeff = BHeff(normHeffin)
      normHeff = BHeff_inv(normBeffin)
      normHeffin = sqrt(realdot(H1,H1)+realdot(H2,H2)+realdot(H3,H3)+eps)
      DESCR_PREFIX:normHeffin = Effective magnetic field norm
      normBeffin = sqrt(realdot(B1,B1)+realdot(B2,B2)+realdot(B3,B3)+eps)
      DESCR_PREFIX:normBeffin = Effective magnetic flux density norm
      BHeff: Interpolation
        table = 
          {0, 0}
          {663.146, 1.00000005169}
          {1067.5, 1.49364951241}
          {1705.23, 1.94153284613}
          {2463.11, 2.25776566937}
          {3841.67, 2.60998064243}
          {5425.74, 2.86644520908}
          {7957.75, 3.14414380972}
          {12298.3, 3.44853805165}
          {20462.8, 3.78167119737}
          {32169.6, 4.05834559011}
          {61213.4, 4.42064655295}
          {111408, 4.72127408955}
          {188487.757, 4.97214814072}
          {267930.364, 5.14551086086}
          {347507.836, 5.24551086143}
        extrap = linear
        fununit = T
        argunit = A/m
        defineinv = on

Physics
  mf: InductionCurrents "Magnetic Fields" on domains 1-5
    dependent variable A = {Ax, Ay, Az}
    al1: AmperesLaw "Ampère's Law 1" (default)
    mi1: MagneticInsulation (default)
    init1: init "Initial Values 1" (default)
    coil1: Coil on domains 4, 5
      ConductorModel = Multi
      CoilType = Numeric
      ICoil = I
      N = N
      coilWindArea = a_litz
      mur_mat = from_mat
      ccc1: CoilCurrentCalculation "Geometry Analysis 1" (default)
        ct1: CoilTerminal "Input 1" on boundaries 42, 46
        cg1: CoilGround "Output 1" on boundaries 49, 50
    coil2: Coil on domains 5 | ConductorModel = Multi; CoilType = Numeric; ICoil = 0; N = 20; coilWindArea = 0.35e-6[m^2]
      ccc1: CoilCurrentCalculation "Geometry Analysis 1" (default)
        ct1: CoilTerminal "Input 1" on boundaries 50
        cg1: CoilGround "Output 1" on boundaries 46

Mesh
  mesh1 "Mesh 1" (physics-controlled)
    size: MeshSizeDefault | hauto = 3

Studies
  std2 "Study"
    ccc: CoilCurrentCalculation "Coil Geometry Analysis"
    freq: Frequency "Frequency Domain" | punit = kHz; plist = 100